# OpenSim document version 40000
InverseKinematicsTool:
  model_file: /home/ln424/Documents/CAMERA/BioCV_Project/markerless_data/2020-02-25-P08/biocv_fullbody_markerless_scaled.osim
  constraint_weight: Inf
  accuracy: 1e-5
  marker_file: /home/ln424/Documents/CAMERA/BioCV_Project/markerless_data/2020-02-25-P08/P08_WALK_02/op-fused/joints_kalman.trc
  time_range: 0 100
  report_errors: false
  output_motion_file: /home/ln424/Documents/CAMERA/BioCV_Project/markerless_data/2020-02-25-P08/P08_WALK_02/op-fused/joints_kalman.mot
  report_marker_locations: false
  IKTaskSet:
    IKMarkerTask RIGHT_SHO: apply=true weight=1
    IKMarkerTask LEFT_SHO: apply=true weight=1
    IKMarkerTask NECK: apply=true weight=1
    IKMarkerTask RIGHT_ELBOW: apply=true weight=1
    IKMarkerTask RIGHT_WRIST: apply=true weight=1
    IKMarkerTask LEFT_ELBOW: apply=true weight=1
    IKMarkerTask LEFT_WRIST: apply=true weight=1
    IKMarkerTask LEFT_HIP: apply=true weight=1
    IKMarkerTask RIGHT_HIP: apply=true weight=1
    IKMarkerTask LEFT_KNEE: apply=true weight=1
    IKMarkerTask RIGHT_KNEE: apply=true weight=1
    IKMarkerTask RIGHT_ANKLE: apply=true weight=1
    IKMarkerTask RIGHT_HEEL: apply=true weight=1
    IKMarkerTask RIGHT_MTP1: apply=true weight=1
    IKMarkerTask RIGHT_MTP5: apply=true weight=1
    IKMarkerTask LEFT_ANKLE: apply=true weight=1
    IKMarkerTask LEFT_HEEL: apply=true weight=1
    IKMarkerTask LEFT_MTP1: apply=true weight=1
    IKMarkerTask LEFT_MTP5: apply=true weight=1
