# OpenSim document version 40000
InverseKinematicsTool:
  model_file: /home/ln424/Documents/CAMERA/BioCV_Project/markerless_data/2020-02-24-P19/biocv_fullbody_markers_scaled.osim
  constraint_weight: Inf
  accuracy: 1e-5
  marker_file: /home/ln424/Documents/CAMERA/BioCV_Project/markerless_data/2020-02-24-P19/P19_RUN_08/markers.trc
  time_range: 0 100
  report_errors: true
  output_motion_file: /home/ln424/Documents/CAMERA/BioCV_Project/markerless_data/2020-02-24-P19/P19_RUN_08/markers.mot
  report_marker_locations: false
  IKTaskSet:
    IKMarkerTask ACROM_R: apply=true weight=0
    IKMarkerTask RIGHT_SHO: apply=true weight=0
    IKMarkerTask ACROM_L: apply=true weight=0
    IKMarkerTask LEFT_SHO: apply=true weight=0
    IKMarkerTask C7: apply=true weight=1
    IKMarkerTask T10: apply=true weight=1
    IKMarkerTask CLAV: apply=true weight=1
    IKMarkerTask XIP_PROC: apply=true weight=1
    IKMarkerTask UA_PR_ANT_R: apply=true weight=1
    IKMarkerTask UA_PR_POST_R: apply=true weight=1
    IKMarkerTask UA_DI_ANT_R: apply=true weight=1
    IKMarkerTask UA_DI_POST_R: apply=true weight=1
    IKMarkerTask ELB_LAT_R: apply=true weight=1
    IKMarkerTask ELB_MED_R: apply=true weight=1
    IKMarkerTask LA_PR_ANT_R: apply=true weight=1
    IKMarkerTask LA_PR_POST_R: apply=true weight=1
    IKMarkerTask LA_DI_ANT_R: apply=true weight=1
    IKMarkerTask LA_DI_POST_R: apply=true weight=1
    IKMarkerTask WRI_LAT_R: apply=true weight=1
    IKMarkerTask WRI_MED_R: apply=true weight=1
    IKMarkerTask HAND_R: apply=true weight=1
    IKMarkerTask UA_PR_ANT_L: apply=true weight=1
    IKMarkerTask UA_PR_POST_L: apply=true weight=1
    IKMarkerTask UA_DI_ANT_L: apply=true weight=1
    IKMarkerTask UA_DI_POST_L: apply=true weight=1
    IKMarkerTask ELB_LAT_L: apply=true weight=1
    IKMarkerTask ELB_MED_L: apply=true weight=1
    IKMarkerTask LA_PR_ANT_L: apply=true weight=1
    IKMarkerTask LA_PR_POST_L: apply=true weight=1
    IKMarkerTask LA_DI_ANT_L: apply=true weight=1
    IKMarkerTask LA_DI_POST_L: apply=true weight=1
    IKMarkerTask WRI_LAT_L: apply=true weight=1
    IKMarkerTask WRI_MED_L: apply=true weight=1
    IKMarkerTask HAND_L: apply=true weight=1
    IKMarkerTask ASIS_R: apply=true weight=1
    IKMarkerTask ASIS_L: apply=true weight=1
    IKMarkerTask PSIS_R: apply=true weight=1
    IKMarkerTask PSIS_L: apply=true weight=1
    IKMarkerTask ILCREST_R: apply=true weight=1
    IKMarkerTask ILCREST_L: apply=true weight=1
    IKMarkerTask LEFT_HIP: apply=true weight=0
    IKMarkerTask RIGHT_HIP: apply=true weight=0
    IKMarkerTask UL_PR_ANT_R: apply=true weight=1
    IKMarkerTask UL_PR_POST_R: apply=true weight=1
    IKMarkerTask UL_DI_ANT_R: apply=true weight=1
    IKMarkerTask UL_DI_POST_R: apply=true weight=1
    IKMarkerTask KNEE_LAT_R: apply=true weight=1
    IKMarkerTask KNEE_MED_R: apply=true weight=1
    IKMarkerTask LL_PR_ANT_R: apply=true weight=1
    IKMarkerTask LL_PR_POST_R: apply=true weight=1
    IKMarkerTask LL_DI_ANT_R: apply=true weight=1
    IKMarkerTask LL_DI_POST_R: apply=true weight=1
    IKMarkerTask MAL_LAT_R: apply=true weight=1
    IKMarkerTask MAL_MED_R: apply=true weight=1
    IKMarkerTask HEEL_R: apply=true weight=1
    IKMarkerTask MTP1_R: apply=true weight=1
    IKMarkerTask MTP5_R: apply=true weight=1
    IKMarkerTask TOE_R: apply=true weight=0
    IKMarkerTask UL_PR_ANT_L: apply=true weight=1
    IKMarkerTask UL_PR_POST_L: apply=true weight=1
    IKMarkerTask UL_DI_ANT_L: apply=true weight=1
    IKMarkerTask UL_DI_POST_L: apply=true weight=1
    IKMarkerTask KNEE_LAT_L: apply=true weight=1
    IKMarkerTask KNEE_MED_L: apply=true weight=1
    IKMarkerTask LL_PR_ANT_L: apply=true weight=1
    IKMarkerTask LL_PR_POST_L: apply=true weight=1
    IKMarkerTask LL_DI_ANT_L: apply=true weight=1
    IKMarkerTask LL_DI_POST_L: apply=true weight=1
    IKMarkerTask MAL_LAT_L: apply=true weight=1
    IKMarkerTask MAL_MED_L: apply=true weight=1
    IKMarkerTask HEEL_L: apply=true weight=1
    IKMarkerTask MTP1_L: apply=true weight=1
    IKMarkerTask MTP5_L: apply=true weight=1
    IKMarkerTask TOE_L: apply=true weight=0
