# OpenSim document version 40000
ScaleTool biocv_fullbody_markers_P17_scaled:
  mass: 75.1646 [kg]
  height: -1
  age: -1
  GenericModelMaker:
    model_file: /home/ln424/Documents/CAMERA/BioCV_Project/markerless_data/biocv_fullbody_markers.osim
  ModelScaler:
    apply: true
    scaling_order: measurements manualScale
    marker_file: /home/ln424/Documents/CAMERA/BioCV_Project/markerless_data/2020-03-05-P17/P17_STATIC_01/markers.trc
    time_range: 0 0.005
    preserve_mass_distribution: false
    output_model_file: /home/ln424/Documents/CAMERA/BioCV_Project/markerless_data/2020-03-05-P17/biocv_fullbody_markers_scaled.osim
    MeasurementSet:
      Measurement torso_x: apply=true
        MarkerPair: markers=(C7 CLAV)
        BodyScale torso: axes=X
      Measurement toros_y: apply=true
        MarkerPair: markers=(ACROM_L ILCREST_L)
        MarkerPair: markers=(ACROM_R ILCREST_R)
        BodyScale torso: axes=Y
      Measurement torso_z: apply=true
        MarkerPair: markers=(ACROM_L ACROM_R)
        BodyScale torso: axes=Z
      Measurement femur_r_xz: apply=true
        MarkerPair: markers=(KNEE_LAT_R KNEE_MED_R)
        BodyScale femur_r: axes=(X Z)
      Measurement femur_r_y: apply=true
        MarkerPair: markers=(RIGHT_HIP KNEE_LAT_R)
        MarkerPair: markers=(RIGHT_HIP KNEE_MED_R)
        BodyScale femur_r: axes=Y
      Measurement femur_l_xz: apply=true
        MarkerPair: markers=(KNEE_LAT_L KNEE_MED_L)
        BodyScale femur_l: axes=(X Z)
      Measurement femur_l_y: apply=true
        MarkerPair: markers=(LEFT_HIP KNEE_LAT_L)
        MarkerPair: markers=(LEFT_HIP KNEE_MED_L)
        BodyScale femur_l: axes=Y
      Measurement foot_r_x: apply=false
        MarkerPair: markers=(HEEL_R MTP1_R)
        MarkerPair: markers=(HEEL_R MTP5_R)
      Measurement foot_r_yz: apply=false
        MarkerPair: markers=(MTP1_R MTP5_R)
      Measurement foot_l_x: apply=false
        MarkerPair: markers=(HEEL_L MTP1_L)
        MarkerPair: markers=(HEEL_L MTP5_L)
      Measurement foot_l_yz: apply=false
        MarkerPair: markers=(MTP1_L MTP5_L)
      Measurement tibia_r_y: apply=true
        MarkerPair: markers=(KNEE_LAT_R MAL_LAT_R)
        MarkerPair: markers=(KNEE_MED_R MAL_MED_R)
        BodyScale tibia_r: axes=Y
      Measurement tibia_r_xz: apply=true
        MarkerPair: markers=(KNEE_LAT_R KNEE_MED_R)
        MarkerPair: markers=(MAL_LAT_R MAL_MED_R)
        BodyScale tibia_r: axes=(X Z)
      Measurement tibia_l_y: apply=true
        MarkerPair: markers=(KNEE_LAT_L MAL_LAT_L)
        MarkerPair: markers=(KNEE_MED_L MAL_MED_L)
        BodyScale tibia_l: axes=Y
      Measurement tibia_l_xz: apply=true
        MarkerPair: markers=(KNEE_LAT_L KNEE_MED_L)
        MarkerPair: markers=(MAL_LAT_L MAL_MED_L)
        BodyScale tibia_l: axes=(X Z)
      Measurement humerus_r_y: apply=true
        MarkerPair: markers=(RIGHT_SHO ELB_LAT_R)
        MarkerPair: markers=(RIGHT_SHO ELB_MED_R)
        BodyScale humerus_r: axes=Y
      Measurement humerus_r_xz: apply=true
        MarkerPair: markers=(ELB_LAT_R ELB_MED_R)
        BodyScale humerus_r: axes=(X Z)
      Measurement humerus_l_y: apply=true
        MarkerPair: markers=(LEFT_SHO ELB_LAT_L)
        MarkerPair: markers=(LEFT_SHO ELB_MED_L)
        BodyScale humerus_l: axes=Y
      Measurement humerus_l_xz: apply=true
        MarkerPair: markers=(ELB_LAT_L ELB_MED_L)
        BodyScale humerus_l: axes=(X Z)
      Measurement ulna_r_y: apply=true
        MarkerPair: markers=(ELB_LAT_R WRI_LAT_R)
        MarkerPair: markers=(ELB_MED_R WRI_MED_R)
        BodyScale ulna_r: axes=Y
      Measurement ulna_r_xz: apply=true
        MarkerPair: markers=(ELB_LAT_R ELB_MED_R)
        MarkerPair: markers=(WRI_LAT_R WRI_MED_R)
        BodyScale ulna_r: axes=(X Z)
      Measurement ulna_l_y: apply=true
        MarkerPair: markers=(ELB_LAT_L WRI_LAT_L)
        MarkerPair: markers=(ELB_MED_L WRI_MED_L)
        BodyScale ulna_l: axes=Y
      Measurement ulna_l_xz: apply=true
        MarkerPair: markers=(ELB_LAT_L ELB_MED_L)
        MarkerPair: markers=(WRI_LAT_L WRI_MED_L)
        BodyScale ulna_l: axes=(X Z)
      Measurement pelvis_x: apply=true
        MarkerPair: markers=(ASIS_L PSIS_L)
        MarkerPair: markers=(ASIS_R PSIS_R)
        BodyScale pelvis: axes=X
      Measurement pelvis_y: apply=true
        MarkerPair: markers=(LEFT_HIP ILCREST_L)
        MarkerPair: markers=(RIGHT_HIP ILCREST_R)
        BodyScale pelvis: axes=Y
      Measurement pelvis_z: apply=true
        MarkerPair: markers=(ASIS_L ASIS_R)
        BodyScale pelvis: axes=Z
    ScaleSet:
      Scale: scales=(0.95 0.95 0.95) segment=pelvis apply=false
  MarkerPlacer:
    apply: true
    marker_file: /home/ln424/Documents/CAMERA/BioCV_Project/markerless_data/2020-03-05-P17/P17_STATIC_01/markers.trc
    time_range: 0 0.005
    output_motion_file: output_motion_file.mot
    output_model_file: /home/ln424/Documents/CAMERA/BioCV_Project/markerless_data/2020-03-05-P17/biocv_fullbody_markers_scaled.osim
    output_marker_file: output_marker_file.xml
    max_marker_movement: -1
    IKTaskSet:
      IKMarkerTask ACROM_R: apply=true weight=1
      IKMarkerTask RIGHT_SHO: apply=true weight=0
      IKMarkerTask ACROM_L: apply=true weight=1
      IKMarkerTask LEFT_SHO: apply=true weight=0
      IKMarkerTask C7: apply=true weight=1
      IKMarkerTask T10: apply=true weight=0
      IKMarkerTask CLAV: apply=true weight=1
      IKMarkerTask XIP_PROC: apply=true weight=1
      IKMarkerTask UA_PR_ANT_R: apply=true weight=0
      IKMarkerTask UA_PR_POST_R: apply=true weight=0
      IKMarkerTask UA_DI_ANT_R: apply=true weight=0
      IKMarkerTask UA_DI_POST_R: apply=true weight=0
      IKMarkerTask ELB_LAT_R: apply=true weight=1
      IKMarkerTask ELB_MED_R: apply=true weight=1
      IKMarkerTask LA_PR_ANT_R: apply=true weight=0
      IKMarkerTask LA_PR_POST_R: apply=true weight=0
      IKMarkerTask LA_DI_ANT_R: apply=true weight=0
      IKMarkerTask LA_DI_POST_R: apply=true weight=0
      IKMarkerTask WRI_LAT_R: apply=true weight=1
      IKMarkerTask WRI_MED_R: apply=true weight=1
      IKMarkerTask HAND_R: apply=true weight=1
      IKMarkerTask UA_PR_ANT_L: apply=true weight=0
      IKMarkerTask UA_PR_POST_L: apply=true weight=0
      IKMarkerTask UA_DI_ANT_L: apply=true weight=0
      IKMarkerTask UA_DI_POST_L: apply=true weight=0
      IKMarkerTask ELB_LAT_L: apply=true weight=1
      IKMarkerTask ELB_MED_L: apply=true weight=1
      IKMarkerTask LA_PR_ANT_L: apply=true weight=0
      IKMarkerTask LA_PR_POST_L: apply=true weight=0
      IKMarkerTask LA_DI_ANT_L: apply=true weight=0
      IKMarkerTask LA_DI_POST_L: apply=true weight=0
      IKMarkerTask WRI_LAT_L: apply=true weight=1
      IKMarkerTask WRI_MED_L: apply=true weight=1
      IKMarkerTask HAND_L: apply=true weight=1
      IKMarkerTask ASIS_R: apply=true weight=1
      IKMarkerTask ASIS_L: apply=true weight=1
      IKMarkerTask PSIS_R: apply=true weight=1
      IKMarkerTask PSIS_L: apply=true weight=1
      IKMarkerTask ILCREST_R: apply=true weight=0
      IKMarkerTask ILCREST_L: apply=true weight=0
      IKMarkerTask LEFT_HIP: apply=true weight=1
      IKMarkerTask RIGHT_HIP: apply=true weight=1
      IKMarkerTask UL_PR_ANT_R: apply=true weight=0
      IKMarkerTask UL_PR_POST_R: apply=true weight=0
      IKMarkerTask UL_DI_ANT_R: apply=true weight=0
      IKMarkerTask UL_DI_POST_R: apply=true weight=0
      IKMarkerTask KNEE_LAT_R: apply=true weight=1
      IKMarkerTask KNEE_MED_R: apply=true weight=1
      IKMarkerTask LL_PR_ANT_R: apply=true weight=0
      IKMarkerTask LL_PR_POST_R: apply=true weight=0
      IKMarkerTask LL_DI_ANT_R: apply=true weight=0
      IKMarkerTask LL_DI_POST_R: apply=true weight=0
      IKMarkerTask MAL_LAT_R: apply=true weight=1
      IKMarkerTask MAL_MED_R: apply=true weight=1
      IKMarkerTask HEEL_R: apply=true weight=1
      IKMarkerTask MTP1_R: apply=true weight=1
      IKMarkerTask MTP5_R: apply=true weight=1
      IKMarkerTask TOE_R: apply=true weight=1
      IKMarkerTask UL_PR_ANT_L: apply=true weight=0
      IKMarkerTask UL_PR_POST_L: apply=true weight=0
      IKMarkerTask UL_DI_ANT_L: apply=true weight=0
      IKMarkerTask UL_DI_POST_L: apply=true weight=0
      IKMarkerTask KNEE_LAT_L: apply=true weight=1
      IKMarkerTask KNEE_MED_L: apply=true weight=1
      IKMarkerTask LL_PR_ANT_L: apply=true weight=0
      IKMarkerTask LL_PR_POST_L: apply=true weight=0
      IKMarkerTask LL_DI_ANT_L: apply=true weight=0
      IKMarkerTask LL_DI_POST_L: apply=true weight=0
      IKMarkerTask MAL_LAT_L: apply=true weight=1
      IKMarkerTask MAL_MED_L: apply=true weight=1
      IKMarkerTask HEEL_L: apply=true weight=1
      IKMarkerTask MTP1_L: apply=true weight=1
      IKMarkerTask MTP5_L: apply=true weight=1
      IKMarkerTask TOE_L: apply=true weight=1
