# OpenSim document version 40000
ScaleTool biocv_fullbody_op_P17_scaled:
  mass: 75.1646 [kg]
  height: -1
  age: -1
  GenericModelMaker:
    model_file: /home/ln424/Documents/CAMERA/BioCV_Project/markerless_data/biocv_fullbody_op.osim
  ModelScaler:
    apply: true
    scaling_order: measurements manualScale
    marker_file: /home/ln424/Documents/CAMERA/BioCV_Project/markerless_data/2020-03-05-P17/P17_STATIC_01/P17_static_op.trc
    time_range: 0 0.33
    preserve_mass_distribution: false
    output_model_file: /home/ln424/Documents/CAMERA/BioCV_Project/markerless_data/2020-03-05-P17/biocv_fullbody_markerless_scaled.osim
    MeasurementSet:
      Measurement pelvis: apply=true
        MarkerPair: markers=(LEFT_HIP RIGHT_HIP)
        BodyScale pelvis: axes=(X Y Z)
      Measurement femur_r: apply=true
        MarkerPair: markers=(RIGHT_HIP RIGHT_KNEE)
        BodyScale femur_r: axes=Y
      Measurement tibia_r: apply=true
        MarkerPair: markers=(RIGHT_KNEE RIGHT_ANKLE)
        BodyScale tibia_r: axes=(X Y Z)
      Measurement foot_r: apply=false
        MarkerPair: markers=(RIGHT_ANKLE RIGHT_HEEL)
        MarkerPair: markers=(RIGHT_MTP1 RIGHT_MTP5)
      Measurement femur_l: apply=true
        MarkerPair: markers=(LEFT_HIP LEFT_KNEE)
        BodyScale femur_l: axes=Y
      Measurement tibia_l: apply=true
        MarkerPair: markers=(LEFT_KNEE LEFT_ANKLE)
        BodyScale tibia_l: axes=(X Y Z)
      Measurement foot_l: apply=false
        MarkerPair: markers=(LEFT_ANKLE LEFT_HEEL)
        MarkerPair: markers=(LEFT_MTP1 LEFT_MTP5)
      Measurement torso: apply=true
        MarkerPair: markers=(LEFT_SHO RIGHT_SHO)
        BodyScale torso: axes=(X Y Z)
      Measurement humerus_r: apply=true
        MarkerPair: markers=(RIGHT_SHO RIGHT_ELBOW)
        BodyScale humerus_r: axes=(X Y Z)
      Measurement ulna_r: apply=true
        MarkerPair: markers=(RIGHT_ELBOW RIGHT_WRIST)
        BodyScale ulna_r: axes=(X Y Z)
        BodyScale radius_r: axes=(X Y Z)
        BodyScale radius_l: axes=(X Y Z)
      Measurement humerus_l: apply=true
        MarkerPair: markers=(LEFT_SHO LEFT_ELBOW)
        BodyScale humerus_l: axes=(X Y Z)
      Measurement ulna_l: apply=true
        MarkerPair: markers=(LEFT_ELBOW LEFT_WRIST)
        BodyScale ulna_l: axes=(X Y Z)
    ScaleSet:
      Scale: scales=(0.95 0.95 0.95) segment=pelvis apply=true
  MarkerPlacer:
    apply: true
    marker_file: /home/ln424/Documents/CAMERA/BioCV_Project/markerless_data/2020-03-05-P17/P17_STATIC_01/P17_static_op.trc
    time_range: 0 0.125
    output_motion_file: output_motion_file.mot
    output_model_file: /home/ln424/Documents/CAMERA/BioCV_Project/markerless_data/2020-03-05-P17/biocv_fullbody_markerless_scaled.osim
    output_marker_file: output_marker_file.xml
    max_marker_movement: -1
    IKTaskSet:
      IKMarkerTask RIGHT_SHO: apply=true weight=1
      IKMarkerTask LEFT_SHO: apply=true weight=1
      IKMarkerTask NECK: apply=true weight=1
      IKMarkerTask RIGHT_ELBOW: apply=true weight=1
      IKMarkerTask RIGHT_WRIST: apply=true weight=1
      IKMarkerTask LEFT_ELBOW: apply=true weight=1
      IKMarkerTask LEFT_WRIST: apply=true weight=1
      IKMarkerTask LEFT_HIP: apply=true weight=1
      IKMarkerTask RIGHT_HIP: apply=true weight=1
      IKMarkerTask LEFT_KNEE: apply=true weight=1
      IKMarkerTask RIGHT_KNEE: apply=true weight=1
      IKMarkerTask RIGHT_ANKLE: apply=true weight=1
      IKMarkerTask RIGHT_HEEL: apply=true weight=1
      IKMarkerTask RIGHT_MTP1: apply=true weight=0.01
      IKMarkerTask RIGHT_MTP5: apply=true weight=0.1
      IKMarkerTask LEFT_ANKLE: apply=true weight=1
      IKMarkerTask LEFT_HEEL: apply=true weight=1
      IKMarkerTask LEFT_MTP1: apply=true weight=0.01
      IKMarkerTask LEFT_MTP5: apply=true weight=0.1
